# GÉPELEMEK I.
#
# Első házi feladat
# Vakkarimával lezárt csővég tervezése
# Fauszt András Ákos
# V04MEA
# Dr. Csobán Attila
# Tartalomjegyzék
#
# A kiadott feladat leírása  ........................2
# A csővég összeállítási rajza .....................3
# A feladat célja ..................................4
# Előtervezés ......................................4
# Anyagválasztás ...................................5
# Vakkarima vastagsága .............................5
# Tömítés erőkifejtése .............................6
# Csavarok húzószilárdsági ellenőrzése .............6
# Csavarok csavarószilárdsági ellenőrzése ..........7
# Klein-diagram ....................................8
# Csavarok egyenértékű feszültségei ................9
# Bibliográfia .....................................9
# A dokumentációt és a számolásokat a PTC Mathcad Express alkalmazásban készítettem el. Az alkatrészeket Autodesk inventorban lemodelleztem, és elkészítettem az alkatrész illetve az összeállítási rajzukat.
# 1
# A feladat célja
# A cél egy csővég megtervezése ismert 8 bar üzemi nyomással és 50 mm-es csőátmérővel.
# A csővéget egy tömítéses vakkarimával zárjuk le. A kettő közötti kapcsolatot egy átmenő
# csavarkötéssel biztosítjuk. A feladat a tömítés és a csavarkötés szilárdságtani ellenőrzése,
# illetve ezek anyagválasztása.
#
# Előtervezés
#
# A szerkezet egy hegtoldatos karimából, egy tömítésből és egy vakkarimából all, valamint az őket összefogó csavarokból.
#
# A hegtoldatos karimából a választás a DIN 2632 PN10-re esett, amely a Zetamec szabványa [1] szerint az alábbi adatokkal rendelkezik:
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# Ahol:
d_1 := 57 mm
k := 125 mm
p_ü := 8 bar = 0.8 MPa
D_N := 50 mm
s := 2.9 mm
d_3 := 72 mm
d_2 := 18 mm
D := 165 mm
d := D_N
d_4 := 102 mm
# A tömítésnek a méretei, mivel a csővég karimás, ezért a méretei nD_N = 50 mm és  nd_4 = 102 mm-re választom. A vastagságot nem érdemes túl nagyra választani, mert a csavarokban hajlító erő ébred, ami nagyban növeli a tönkremenetel kockázatát.
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# 4
# A tömítést a vakkarimával szorítjuk rá a nyakra. A vakkarimát az MSZ 4582, DIN 2527 P10 [2] szabvány alapján méretezük. A vastagságát később számoljuk ki.
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# Anyagválasztás:
#
# Mielőtt elkezdhetjük a méretezést, előtte anyagot kell választani. Mivel az üzemi nyomás nem túl maga, ezért eltérhetünk a költséghatékonyság irányába.
# A karima anyagának az S235 jelű általános rendeltetésű szerkezeti acélt választom.
#
# A tömítés anyagának legcélszerűbb egy egyszerű gumi lágytömítést választani.
#
# A csavar anyagát a feszültségek kiszámolása után tudjuk megmondani.
# Az S235-ös acélnak a folyáshatára R_eH := 290 MPa
# A biztonsági tényezőt n := 1.5-re választjuk
# Vakkarima vastagsága
#
# Ekkor azt megmondhatjuk, hogy mennyi a megengedhető legnagyobb hajlító feszültség ha biztonsági tényező n = 1.5
σ_hajl := R_eH/n = 193.333 MPa
d_t := (d_1 - 2*s + d_4)/2 = 76.6 mm
b_min := d_t/2*sqrt(3*p_ü/σ_hajl*(1 - 2*d_t/(3*k))) = 3.28183 mm
# A szabványban előírt érték 18 mm lenne, de a költséghatékonyság érdekében egy vékonyabb b := 10 mm-es értéket választottam.
# 5
# A tömítés erőkifejtése
#
# A tömítés adatai:
# A tömítés szélessége:b_t := (d_4 - (d_1 - 2*s))/2 = 25.4 mm
# A tömítéseffektív szélessége:b'_t := 1.1*b_t
# Valamint a tömítés anyagát figyelembe vevő tényező: n_t := 1.5
F_t := n_t*p_ü*π*d_t*b'_t = 8.06838 kN
# A csavar húzószilárdsági ellenőrzése
#
# A csavarokra kétféle igénybevétel hat: egy (σ_N) normál, ami a feszítő erőből származik, illetve egy csavaró feszültség (τ_t) ami a lecsavarodást akadályozza meg.
# Az ébredő feszültséget a σ_N = F_V/A_e képlettel számolhatjuk.
A_d := (d_1 - 2*s)^2*π/4 = 2058.87 mm^2
F_cső := p_ü*A_d = 1.6471 kN  # A vakkarimát nyomó csőerő a rögzítés révén húza a csavart
F_p := p_ü*(d_t^2 - (d_1 - 2*s)^2)*π/4 = 2.0396 kN  # Az üzemi nyomásból származó erő a tömítés felületén hat
F_ü := 1.2*(F_cső + F_p + F_t) = 14.1061 kN
# Mivel N := 4 csavarra méretezünk, így kiszámolhatjuk az előfeszítő erőt
F_V := F_ü/N = 3.52652 kN
# A csavarokban feszültsége az egyenértékű keresztmetszeten hat, amely átmérője a csavar magátmérője és a középátmérőjének átlaga. Az értékeket kikereshetjük a szabványból [3]
# Az értékek:d_cs := 16 mm esetén
# A középátmérő:  d_2cs := 14.701 mm
# A magátmérő:  d_3cs := 13.546 mm
# A menetemelkedés:  P := 2 mm
d_e := (d_3cs + d_2cs)/2 = 14.1235 mm  # Ahol d_3 a magátmérő d_2a középátmérő d_e pedig az egyenértékű átmérő
# 6
A_e := d_e^2*π/4 = 156.666 mm^2
σ_N := F_V/A_e = 22.5098 MPa  # Ahol σ_Na csavarban ébredő normál feszültség, F_V pedig az előfeszítés
# A csavarok csavarószilárdsági ellenőrzése
# A csavarkötés τ-igénybevétele a szilárdságtanból ismert képlet alapján: τ_t= M_t/I_p*r a keresztmetszetben kifelé haladva a feszültség folyamatosan nő, és a feszültségmaximum r := d_e/2 = 7.06175 mm -nél van.
# A körkeresztmetszet poláris másodrendű nyomatéka I_p := d_e^4*π/32 = 3906.33 mm^4
# A csavarónyomaték két részből áll elő. Hat egy része a menetekben, ezt a menetemelkedés és a látszólagos súrlódási félkúpszög tangensével írhatjuk fel. Emellett hatnia kell egy savarónyomatéknak az anya alatt is, amely a becsavaráskor keletkezik, és egy anya alatti súrlódási együtthatóval írhatjuk fel.
# M_t= F_V*d_2/2*tan(α + ρ') + F_V*d_a/2*μ_a
# A menetemelkedés számítható a szabványban található adatokból [3]
α := atan(P/(d_2cs*π)) = 2.47962 deg
# Az anya alatti felfekvő felületet jellemzi a d_a, amelyet felírhatunk az átmérő és a laptávolság távolságából. Az anya (ISO 4032) laptávolságát is megnézhetjök szabványban [4] s_anya := 24 mm
d_a := (d_cs + s_anya)/2 = 20 mm
# A súrlődási tényezők tapasztalat értékek. Értéküket tapasztalai úton lehet meghatározni eléggé nagy pontatlansággal. A μ_min := 0.1valamint μ_max := 0.23
# A menetemelkedés szöge metrikus menetre: β := 60°
ρ'_min := atan(μ_min/cos(β/2)) = 6.58678°
ρ'_max := atan(μ_max/cos(β/2)) = 14.8733°
# 7
M_tmin := F_V*(d_2cs/2*tan(α + ρ'_min) + d_a/2*μ_min) = 7.66291 N*m
M_tmax := F_V*(d_2cs/2*tan(α + ρ'_max) + d_a/2*μ_max) = 16.211 N*m
τ_t := M_tmax/I_p*d_e/2 = 29.3058 MPa
# Klein-diagram
# [plot: M_tmax (N*mm), M_tmax*1.05 (N*mm), M_tmax*0.95 (N*mm), μ_min*x, μ_max*x vs x]
# N
# N
# 8
# Csavarok egyenértékű feszültségei
σ_egy := sqrt(σ_N^2 + 3*τ_t^2) = 55.5263 MPa
# Ezt kell összehasonlítani a csavar szakítószilárdságával, és az egyenletet átrendezve megkaphatjuk, hogy mennyire erős csavarra van szükségünk:
#
# σ_egy<σ_meg := R_eH/n = 193.333 MPa
R_eHmin := σ_egy*n = 83.2895 MPa
# Látható, hogy viszonylag alacsony szakítószilárdsági értékű csavar is megfelelő. Így a csavar anyagának egy 3.6-os acélt választunk, valamint egy hozzá illő 4.6-os anyát.
# Bibliográfia
#
# 1.  Zetamec szabvány PN10 karimára
# http://www.zetamec.com/din-2632-pn10_eng.htm  (2017.10.18)
# 2.  A Well Kft. szabványa
# http://www.wellkft.hu/karima_17.html  (2017.10.18)
# 3.  Tribology a metrikus menet ISO 724 részletes adatai
# http://www.tribology-abc.com/calculators/metric-iso.htm  (2017.10.18)
# 4.  ISO 4032 anya szabványa
# http://www.sasovits.hu/cnc/irodalom/gepelemek/anya.pdf  (2017.10.18)
# 5.  A súrlódási tényezők táblázata VDI 2230
# http://corp.brwtools.hu/web4archiv/objects/objekte/tools/downloads/1/reibung_reibungszahlen_hu.pdf  (2017.10.18)
# 9
